# STRASSEN SIMD
amdahl(n, p) := 1/((1 - p) + p/n)
vn := [1; 2; 3; 4]
vy := [12.35/12.35; 12.35/6.62; 12.35/4.88; 12.35/4.08]
12.34 S = 12.34 1/Ω
amdahl_n(n, p) := d/dn(amdahl(n, p))
amdahl_p(n, p) := d/dp(amdahl(n, p))
F(n, p) := [amdahl(n, p); amdahl_p(n, p)]
amdahl(1000, .99) = 90.9918
p_0 := genfit(vn, vy, [.95], F) = 0.8979
amdahl(1000000, p_0) = 9.79421
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# REKURSIV SIMD
vn := [1; 2; 3; 4]
vy := [17.23/17.23; 17.23/8.71; 17.23/5.93; 17.23/4.63]
amdahl(1000, .99) = 90.9918
p_0 := genfit(vn, vy, [.8], F) = 0.977244
amdahl(1000000, p_0) = 43.9429
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# ITERATIV TILED SIMD
vn := [1; 2; 3; 4]
vy := [15.12/15.12; 15.12/7.58; 15.12/5.32; 15.12/4.03]
amdahl(1000, .99) = 90.9918
p_0 := genfit(vn, vy, [.8], F) = 0.97727
amdahl(100, p_0) = 30.767
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# NAIV ROW/COLUMN
vn := [1; 2; 3; 4]
vy := [□; □; □; □]  # error: This placeholder is empty.
amdahl(1000, .99) = 90.9918
p_0 := genfit(vn, vy, [.8], F) = 0.97727
amdahl(100, p_0) = 30.767
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